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/batch
! ANSYS input file written by Workbench version 2026 R1
! File used for geometry attach: D:\S3 MTA\2- Conception Avance & Element Fini\Element fini\TP\TP2\TP2_Poutre_3D_files\dp0\SYS-1\DM\SYS-1.scdocx
/title,TP2_Poutre_3D--Static Structural (B5)
/com,--- Data in consistent MKS units. See Solving Units in the help system for more information.
/units,MKS
/prep7
! Turn off shape checking because checks already performed inside WB mesher.
! See help system for more information.
SHPP,OFF,,NOWARN
etcon,set             ! allow ANSYS to choose best KEYOP's for 180x elements, resets any applicable keyopt to MAPDL defaults
/com,*********** Send User Defined Coordinate System(s) ***********
csys,0
/com,*********** Nodes for the whole assembly ***********
nblock,3,,683
(1i9,3e20.9e3)
        1    -3.000000000E-02     9.500000000E-01    -3.000000000E-02
        2    -3.000000000E-02     9.000000000E-01    -3.000000000E-02
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-1
/com,*********** Nodes for all Remote Points ***********
nblock,3
(1i9,3e20.9e3)
      622    -2.999999933E-02     1.000000000E+00    -2.999999933E-02
      623    -2.999999933E-02     0.000000000E+00    -2.999999933E-02
-1
/com,*********** Elements for Body 1 'SYS-1\Solid' ***********
et,1,186
keyo,1,2,1          ! set full integration on SOLID186
MAT,1 $ TYPE,1 $ REAL,1 $ SECNUM,1 $ ESYS,0    ! ELEMNODES = 20
eblock,21,COMPACT,,80
(21i9)
        1        1      108      111      152       38      109      110      189      193      502      508      195      341      504      507      343      191      501      506      568
        2        1      152      111      108       39       58       96       97      195      508      502      193      345      403      480      347      192      404      481      483
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-1
secnum,1    ! reset the section ID to default
toffst,273.15,      ! Temperature offset from absolute zero
/com,*********** Set Reference Temperature ***********
tref,22.
/com,*********** Send Materials ***********
MP,EX,1,210000000000,	! Pa
MP,NUXY,1,0.3,

!************************* Model Summary ********************
! SYS-1\Solid,	Acier_TP2_210000MPa,	matid,	1
!************************* End Model Summary ********************
/com,*********** Create Remote Point "Internal Remote Point" ***********
! -------- Remote Point Used by "Remote Displacement" --------
*set,tid,3
*set,cid,2
et,cid,174
et,tid,170
keyo,tid,2,1               ! Don't fix the pilot node
keyo,tid,4,111111
keyo,cid,12,5              ! Bonded Contact
keyo,cid,4,2               ! Rigid CERIG style load
keyo,cid,2,2               ! MPC style contact
MAT,2 $ TYPE,2 $ REAL,2 $ SECNUM,2 $ ESYS,0    ! ELEMNODES = 8
eblock,21,COMPACT,,4
(21i9)
      251      111      108       97       96      502      483      480      481
      252      110      109      108      111      504      501      502      506
      253      108      112       98       97      503      484      482      483
      254      109      113      112      108      505      509      503      501
-1
secnum,1    ! reset the section ID to default
*set,_npilot,622
_npilot30=_npilot
type,tid
mat ,cid
real,cid
tshape,pilo
en,255,_npilot
tshape
/com,*********** Create Remote Point "Internal Remote Point 2" ***********
! -------- Remote Point Used by "Remote Displacement 2" --------
*set,tid,5
*set,cid,4
et,cid,174
et,tid,170
keyo,tid,2,1               ! Don't fix the pilot node
keyo,tid,4,111111
keyo,cid,12,5              ! Bonded Contact
keyo,cid,4,2               ! Rigid CERIG style load
keyo,cid,2,2               ! MPC style contact
MAT,4 $ TYPE,4 $ REAL,4 $ SECNUM,4 $ ESYS,0    ! ELEMNODES = 8
eblock,21,COMPACT,,4
(21i9)
      256      105      102      103      104      491      490      493      495
      257       99      100      102      105      485      488      491      486
      258      102      106      107      103      492      498      494      490
      259      100      101      106      102      487      489      492      488
-1
secnum,1    ! reset the section ID to default
*set,_npilot,623
_npilot33=_npilot
type,tid
mat ,cid
real,cid
tshape,pilo
en,260,_npilot
tshape
/com,*********** Define Force Using Surface Effect Elements ***********
local,12,0,0.,0.,0.,0.,0.,0.
csys,0
et,6,154
MAT,6 $ TYPE,6 $ REAL,6 $ SECNUM,6 $ ESYS,12    ! ELEMNODES = 8
eblock,21,COMPACT,,40
(21i9)
      261      111      152      189      110      508      568      507      506
      262       96       58      152      111      403      404      508      481
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-1
secnum,1    ! reset the section ID to default
esel,s,type,,6
keyop,6,2,1         ! Apply load in local coordinate system
keyop,6,7,1         ! Use original area so load is constant in large deformation
esel,all
/com,*********** Construct Remote Displacement ***********
/com,*********** Construct Remote Displacement ***********

/COM,*** Create a component for all remote displacements ***
CMBLOCK,REMOTEDISPALL,NODE,        2
(8i10)
       622       623

fini
/com,****************************************************************************
/com,*************************    SOLUTION       ********************************
/com,****************************************************************************
/solu
antype,0                   ! static analysis
_thickRatio=  0     ! Ratio of thick parts in the model
eqsl,sparse,,,,,1
cntr,print,1               ! print out contact info and also make no initial contact an error
cncheck,dmp		!	Enable program controlled contact splitting for distributed memory parallel run
dmpoption,emat,no             ! Don't combine emat file for DANSYS
dmpoption,esav,no             ! Don't combine esav file for DANSYS
nldiag,cont,iter           ! print out contact info each equilibrium iteration
rescontrol,,none                 ! Do not keep any restart files
/com,****************************************************
/com,******************* SOLVE FOR LS 1 OF 1 ****************
esel,s,type,,6
nsle
sfe,all,1,pres,1,-91666.6666666735
sfe,all,2,pres,1,0.
sfe,all,3,pres,1,0.
nsel,all
esel,all
d,622,ux,0.
d,622,uy,0.
d,622,uz,0.
d,622,roty,0.
d,623,ux,0.
d,623,uz,0.
nsub,1,1,1
time,1.
outres,erase
outres,all,none
outres,nsol,all,
outres,rsol,all
outres,eangl,all
outres,etmp,all
outres,veng,all
outres,strs,all,
outres,epel,all,
outres,eppl,all,
outres,cont,all,
! *********** WB SOLVE COMMAND ***********
! check interactive state
*get,ANSINTER_,active,,int
*if,ANSINTER_,ne,0,then
/eof
*endif
solve
/com *************** Write FE CONNECTORS *********
CEWRITE,file,ce,,INTE
/com,****************************************************
/com,*************** FINISHED SOLVE FOR LS 1 *************
fini
*get,_NSOLTHREADS,active,0,ntfs
*get,_NSOLPROCESSES,active,0,npfs
/post1
fini
